'OPTION' 'DIME' 2;
'OPTION' 'ELEM' QUA4;

O = (0.  0.);
A = (0.5 0);
B = (1 0.);
E = (0 0.1);
D = (0.5 0.1);
C = (1. 0.1);

d0 = 0.005;
d1 = 0.001;
Lbas  = (DROIT O A 'DINI' d0 'DFIN' d1) 'ET'
        (DROIT A B 'DINI' d1 'DFIN' d0);
Lhaut = (DROIT E D 'DINI' d0 'DFIN' d1) 'ET'
        (DROIT D C 'DINI' d1 'DFIN' d0);

eps = 1.e-2;
'DEPLACER' A 'PLUS'  (0 eps);
'DEPLACER' D 'MOINS' (0 eps);

eps = 1.e-16;
stot = 'REGLER' 1 lbas lhaut;
c = 'CONTOUR' stot;
x y = 'COORDONNEE' c;
pts1 = x 'POINT' 'COMPRIS' (-1 '*' eps) eps;
lg = c 'ELEMENT' 'APPUYE' 'STRICTEMENT' pts1;
pts2 = x 'POINT' 'COMPRIS' (1 '-' eps) (1 '+' eps);
ld = c 'ELEMENT' 'APPUYE' 'STRICTEMENT' pts2;

'TRACER' stot;

'OPTION' 'SORTIR' 'bar-with-defect.med';
'SORTIR' MED stot lbas lhaut lg ld;
