'OPTION' 'DIME' 2;
'OPTION' 'ELEM' QUA4;

eps = 1.e-4;
O = (0. 0.);
A = (1. 0.);
B = (0. 0.2);
C = (1. 0.2);

d1 = 0.005;
Lbas  = (DROIT O A 'DINI' d1 'DFIN' d1);
Lhaut = (DROIT B C 'DINI' d1 'DFIN' d1);

eps = 1.e-8;
stot = 'REGLER' 1 lbas lhaut;
c = 'CONTOUR' stot;
x y = 'COORDONNEE' c;
pts1 = x 'POINT' 'COMPRIS' (-1 '*' eps) eps;
lg = c 'ELEMENT' 'APPUYE' 'STRICTEMENT' pts1;
pts2 = x 'POINT' 'COMPRIS' (1 '-' eps) (1 '+' eps);
ld = c 'ELEMENT' 'APPUYE' 'STRICTEMENT' pts2;

'TRACER' stot;

'OPTION' 'SORTIR' 'bar.med';
'SORTIR' MED stot lbas lhaut lg ld;
